<neuroml xmlns="http://www.neuroml.org/schema/neuroml2"  xmlns:xs="http://www.w3.org/2001/XMLSchema" xmlns:xsi="http://www.w3.org/2001/XMLSchema-instance" xsi:schemaLocation="http://www.neuroml.org/schema/neuroml2 https://raw.github.com/NeuroML/NeuroML2/development/Schemas/NeuroML2/NeuroML_v2beta5.xsd" id="OneGoC_Golgi_reduced_twoCaPools_2CaPools">
    <include href="../Cells/Golgi/Golgi_reduced_twoCaPools.cell.nml"/>
    <network id="OneGoC_Golgi_reduced_twoCaPools_2CaPools" type="networkWithTemperature" temperature="23 degC">
        <population id="Golgi_10comp_all_channels_twoCaPoolsPop" component="Golgi_10comp_all_channels_twoCaPools" size="1" type="populationList">
            <instance id="0">
                <location x="0." y="0." z="0."/>
            </instance>
        </population>
    </network>
</neuroml>
